# Входные параметры
# Входное напряжение
V_IN := 5 V
V_IN_max := 10 V
# Диапазон температур
T_min := -10 °C
T_max := 40 °C
# Параметры датчика
# Класс точности
Precision_class := "C3"
# Максимальная  номинальная нагрузка
Cap := 300 kg
# Номинальное выходное напряжение при максимальном весе и при номинальном входном напряжении
V_OUT_rated := (2 mV/V)*V_IN = 0.01 V
# Дрейф нуля
δ_zero_offset := 1%
# Комбинированная погрешность
δ_comb := 0.018%
# Погрешность повторяемости (относительно приложенного веса)
δ_rep := 0.01%
# Погрешность вызываемая деформацией датчика при продолжительной постоянной нагрузке (относительно приложенного веса)
δ_creep := 0.017%
# Погрешность измерения минимального "мертвого" веса после приложения номинальной нагрузки на 30 минут
δ_dr := 0.017%
# Дрейф погрешности измерения минимального "мертвого" веса в зависимости от температуры
δ_dr_offset := 0.001%/Δ°C*(T_max - T_min) = 0.0005
# Чувствительность датчика в зависимости от температуры
δ_sens := 0.001%/Δ°C*(T_max - T_min) = 0.0005
δ_total := δ_sens + δ_dr_offset + δ_dr + δ_creep + δ_rep + δ_comb = 0.00162
Δ_total := Cap*δ_total = 0.486 kg
