# Входное напряжение
Uin := 12 V
# Выставленное усиление (128 или 64)
GAIN := 128
# Питание подаваемое на пин AVDD (от 2.6 до 5.5V)
AVDD := 4.5 V
# Диапазон температур
T_min := -30 °C
T_max := 40 °C
ΔT := T_max - T_min = 70 Δ°C
# АЦП HX711
# Цифровое питание АЦП
Iadc_d := 100 μA
# Аналоговое питание АЦП
Iadc_a := 1400*μA
# Входной диапазон
Urange := 0.5*(AVDD/GAIN) = 17.5781 mV
# Разрядность
q := 24
# Кол. уровней квантования
ADC_max := 2^q = 16777216
# Разрешение по напряжению
Δ_ADC := AVDD/ADC_max = 268.221 nV
# Погрешность смещения входа (при GAIN  = 128)
# Разниц между входами АЦП при отсутствии сигнала. Ее не учитываем т.к. она устраняется тарированием
δ_input_offset_128 := 0.2 mV
# Погрешность смещения входа (при GAIN  = 64)
δ_input_offset_64 := 0.4 mV
# Входной шум
δ_input_noise := 50 nV
# Температурная погрешность
# (при GAIN  = 128)
δ_temp_offset_128 := 6*nV/Δ°C
# Полная погрешность при изменении температуры от мин до максимума
δ_ADC_total := δ_temp_offset_128*(T_max - T_min) + δ_input_noise = 470 nV
# Тензодатчик NA2 C3
# Входное напряжение
V_IN_min := 5 V
V_IN_max := 12 V
# Подаваемое напр. возбуждения
V_IN := AVDD = 4.5 V
# Диапазон температур
T_min := -20 °C
T_max := 60 °C
# Максимальная  номинальная нагрузка
Cap := 300 kg
# Номинальное выходное напряжение при максимальном весе и при номинальном входном напряжении
V_OUT_rated := (2 mV/V)*V_IN = 0.009 V
# Потребление тензодатчика
Isens := 14.2*mA
# Входное сопротивление по паспорту
R_in := 410 Ω
# Отклонение входного сопротивления
R_in_dev := 15 Ω
# Входное полное сопротивление
R_in_real := [R_in + R_in_dev; R_in - R_in_dev] = [425; 395] Ω
R_in := 395 Ω, 1 Ω .. 425 Ω  # disabled
# Выходное сопротивление по паспорту
R_out := 350 Ω
# Отклонение входного сопротивления
R_out_dev := 5 Ω
# Входное полное сопротивление
R_in_real := [R_out + R_out_dev; R_out - R_out_dev] = [355; 345] Ω
R_out := 395 Ω, 1 Ω .. 425 Ω  # disabled
# DC-DC PDS1-S12-S9-M-TR
# Макс. вых. ток
Idc_out_max := 111 mA
# Мин. вых. ток
Idc_out_min := 12 mA
# LDO XC6204B502MR-G
# Макс. вых. ток
Ildo_out_max := 150 mA
# Выходное напряжение
Uldo_out := 5 V
# Мин. вых. напряжение
Uldo_out_min := 0.97*Uldo_out = 4.85 V
# Макс. вых. напряжение
Uldo_out_max := 1.03*Uldo_out = 5.15 V
# Максимальное падение напряжения при нагрузке 30мА
Vldo_dropout_max := 90 mV
# Макс. изм. вых.напряжения от изм. тока нагрузки в диапазоне раб. температур
ΔVldo_out_max := 80 mV
# Макс. потребляемый ток
Ildo_in_max := 120 μA
# Выходной шум питания
Vldo_noise := 30 μV
